# Метод водяных эквивалентов
# [area: Исходные данные для теплового расчета]
P0 := 1*10^5
t1c := 20
t1h := 95
t2c := 53.904
t2h := 61.219
Gh := 1
Gc := 1
cp := 4180
# [area: Исходные данные для труб (диаметры)]
dн := 0.012
nтр := 20
lтр := 3
dвн := 0.01
ds := 0.08
# [area: Проходные сечения]
f1 := nтр*π*dвн^2/4 = 0.0015708
f2 := π*(ds^2 - nтр*dн^2)/4 = 0.0027646
dг1 := dвн = 0.01
П := π*(ds + dн*nтр) = 1.00531
dг2 := 4*f2/(π*(ds + dн*nтр)) = 0.011
# [area: Определение коэффициента теплопередачи]
Tср := (t1h + t2h)/2 = 78.1095
tср := (t1c + t2c)/2 = 36.952
Tст := (Tср + tср)/2 = 57.5307
λст := 42
λ1 := wspTHERMCONDPT(P0, Tср + 273.15)
λ2 := wspTHERMCONDPT(P0, tср + 273.15)
ρ1 := 1/wspVPT(P0, Tср + 273.15) = 972.972
ρ2 := 1/wspVPT(P0, tср + 273.15) = 993.353
ν1 := wspKINVISPT(P0, Tср + 273.15)
ν2 := wspKINVISPT(P0, tср + 273.15)
Pr1ж := wspPRANDTLEPT(P0, Tср + 273.15)
Pr2ж := wspPRANDTLEPT(P0, tср + 273.15)
Pr1ст := wspPRANDTLEPT(P0, Tст + 273.15)
Pr2ст := wspPRANDTLEPT(P0, Tст + 273.15)
cph := wspCPPT(P0, Tср + 273.15) = 4193.96
cpc := wspCPPT(P0, tср + 273.15) = 4178.72
w1 := Gh/(f1*ρ1) = 0.654304
Re1 := w1*dг1/ν1 = 17542.6
Nu1 := 0.021*Re1^0.8*Pr1ж^0.43*(Pr1ж/Pr1ст)^0.25 = 68.8705
α1 := Nu1*λ1/dг1 = 4584.72
w2 := Gc/(f2*ρ2) = 0.364136
Re2 := w2*dг2/ν2 = 5748.45
Nu2 := 0.023*Re2^0.8*Pr2ж^0.4*(Pr2ж/Pr2ст)^0.25 = 47.6812
α2 := Nu2*λ2/dг2 = 2707.66
R1 := 1/(α1*π*dвн*lтр*nтр) = 0.000115714
R2 := 1/(α2*π*dн*lтр*nтр) = 0.000163276
Rст := ln(dн/dвн)/(2*π*λст*nтр*lтр) = 1.15148e-5
Rсумм := R1 + R2 + Rст = 0.000290505
K := 1/Rсумм = 3442.28
# [area: Водяные эквиваленты, NTU]
Cc := Gc*cpc = 4178.72
Ch := Gh*cph = 4193.96
Cmin := min(Cc, Ch) = 4178.72
Cmax := max(Cc, Ch) = 4193.96
Cr := Cmin/Cmax = 0.996367
NTU := K/Cmin = 0.823764
ε := (1 - e^(-NTU*(1 - Cr)))/(1 - Cr*e^(-NTU*(1 - Cr))) = 0.452054
# [area: Тепловая мощность и конечные температуры]
Q := ε*Cmin*(t1h - t1c) = 141676
t2h := t1h - Q/Ch = 61.2191
t2c := t1c + Q/Cc = 53.9041
ΔTh := t1h - t2h = 33.7809
ΔTc := t2c - t1c = 33.9041
ΔTmin := min(ΔTh, ΔTc) = 33.7809
ΔTmax := max(ΔTh, ΔTc) = 33.9041
ΔTlg := (ΔTmax - ΔTmin)/ln(ΔTmax/ΔTmin) = 33.8424
Qalt := K*ΔTlg = 116495
